# Практическая работа №1
# Рассчитайте все значимые параметры для описания потока двухатомного азота при 350 К и 200 кПа со скоростью 100 м/с через канал диаметром 10 мкм.
Mr := 28.013*10^-3 kg/mol  # Молярная масса двухатомного азота, M(N)=14.0067 г/моль
d := 3.75*10^-10 m  # Эффективный диаметр молекулы азота
u := 100 m/s  # Скорость
L := 10^-5 m  # Характерный размер - диаметр канала
R_sr := 8.3145 J/(mol*K)
R := R_sr/Mr
R = 296.809 m^2/(s^2*K)
p := 2*10^5 N/m^2
K := 1.3805*10^-23 J/K
T := 350 K
n := p/(K*T)
n = 4.13929e22 1/L
δ := n^(-1/3)
δ = 2.89085e-9 m
λ := (sqrt(2)*π*d^2*n)^-1
λ = 3.86676e-8 m
c_sr := sqrt(3*R*T)
c_sr = 558.255 m/s
t_c := λ/c_sr
t_c = 6.9265e-11 s
c := sqrt(K*R*T)
c = 1.19754e-9 kg^(1/2)*m^2/(s^2*K^(1/2))
v := (λ*c_sr)/2
v = 1.07932e-5 m^2/s
delta_d := δ/d
# δ/d≫ 1 - разреженный
delta_d = 7.70892
M := u/c
M = 8.35044e10 s*K^(1/2)/(kg^(1/2)*m)  # M<0.3 - несжимаемый
Kn := λ/L
Kn = 0.00386676  # 0.001<Kn<0.01 - Уравнение Навье-Стокса, граничное условие прилипания
Re := u*L/v
Re = 92.651  # Re<1500 - не турбулентный
L_delta := L/δ
L_delta = 3459.2  # L/δ> 20 - нет флуктуаций
